psi(mA) == m_1*mA + b_1
volts(sig) == sig*5/1024
1024/5 = 204.8
5/1024*V = 0.00488281 V
V == I*R
mA(volts) == volts/R*A
R_1 := 263.511*ohm
b_1 := -1.252746011 psi
m_1 := 0.312183186416*psi/mA
psig(sig) := m_1*(sig*5*V/1024/R_1) + b_1
psig(sig) := m_1*(sig*5*V/1024/R_1) + b_1
psig(215) = -0.00903561 psi
cal_m := m_1*(5*V/1024/R_1) = 0.0057847 psi
psig2(sig) := sig*cal_m + b_1
g(sig) := psig2(sig) - psig(sig)
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cal_m = 0.0057847 psi
b_1 = -1.25275 psi
